  // ************************************
  // Drivers for the right fingers
  // ************************************


  //finger1
  AnyKinEqSimpleDriver CMC1Flexion={
    AnyKinMeasure &ref =.RefHM.Interface.Right.CMCFlexion;
    DriverPos= {.JntPos.Right.Finger1.CMCFlexion}*pi/180;
    DriverVel={0};
    Reaction.Type={Off};
  };

  AnyKinEqSimpleDriver CMC1Abduction={
    AnyKinMeasure &ref =.RefHM.Interface.Right.CMCAbduction;
    DriverPos={.JntPos.Right.Finger1.CMCDeviation}*pi/180;
    DriverVel={0};
    Reaction.Type={Off};
  };

  AnyKinEqSimpleDriver MCP1Flexion={
    AnyKinMeasure&ref= .RefHM.Interface.Right.MCPFlexion;
    DriverPos={.JntPos.Right.Finger1.MCPFlexion}*pi/180;
    DriverVel={0};
    Reaction.Type={Off};
  };
  AnyKinEqSimpleDriver MCP1Abduction={
    AnyKinMeasure&ref= .RefHM.Interface.Right.MCPAbduction;
    DriverPos={.JntPos.Right.Finger1.MCPDeviation}*pi/180;
    DriverVel={0};
    Reaction.Type={Off};
  };

  AnyKinEqSimpleDriver DIP1={
    AnyKinMeasure&ref= .RefHM.Interface.Right.DIP;
    DriverPos={.JntPos.Right.Finger1.DIPFlexion}*pi/180;
    DriverVel={0};
    Reaction.Type={Off};
  };


  // finger2
//    AnyKinEqSimpleDriver CMC2={
//      AnyUniversalJoint &ref=  .RefHM.Right.ShoulderArm.Seg.Hand.Finger2.Jnt.CMC;
//      DriverPos={0,0};
//      DriverVel={0,0};
//    };
  AnyKinEqSimpleDriver MCP2={
    AnyUniversalJoint &ref=  .RefHM.Right.ShoulderArm.Seg.Hand.Finger2.Jnt.MCP;
    DriverPos={.JntPos.Right.Finger2.MCPFlexion,.JntPos.Right.Finger2.MCPAbduction}*pi/180;
    DriverVel={0,0};
    Reaction.Type={Off,Off};
  };
  AnyKinEqSimpleDriver PIP2={
    AnyRevoluteJoint &ref=  .RefHM.Right.ShoulderArm.Seg.Hand.Finger2.Jnt.PIP;
    DriverPos={.JntPos.Right.Finger2.PIPFlexion}*pi/180;
    DriverVel={0};
    Reaction.Type={Off};
  };
    AnyKinEqSimpleDriver DIP2={
      AnyRevoluteJoint &ref=  .RefHM.Right.ShoulderArm.Seg.Hand.Finger2.Jnt.DIP;
      DriverPos={.JntPos.Right.Finger2.DIPFlexion}*pi/180;
      DriverVel={0};
      Reaction.Type={Off};
    };


  // finger3
//    AnyKinEqSimpleDriver CMC3={
//      AnyUniversalJoint &ref=  .RefHM.Right.ShoulderArm.Seg.Hand.Finger3.Jnt.CMC;
//      DriverPos={0,0};
//      DriverVel={0,0};
//    };
  AnyKinEqSimpleDriver MCP3={
    AnyUniversalJoint &ref=  .RefHM.Right.ShoulderArm.Seg.Hand.Finger3.Jnt.MCP;
    DriverPos={.JntPos.Right.Finger3.MCPFlexion,.JntPos.Right.Finger3.MCPAbduction}*pi/180;
    DriverVel={0,0};
    Reaction.Type={Off,Off};
  };
  AnyKinEqSimpleDriver PIP3={
    AnyRevoluteJoint &ref=  .RefHM.Right.ShoulderArm.Seg.Hand.Finger3.Jnt.PIP;
    DriverPos={.JntPos.Right.Finger3.PIPFlexion}*pi/180;
    DriverVel={0};
    Reaction.Type={Off};
  };
    AnyKinEqSimpleDriver DIP3={
      AnyRevoluteJoint &ref=  .RefHM.Right.ShoulderArm.Seg.Hand.Finger3.Jnt.DIP;
      DriverPos={.JntPos.Right.Finger3.DIPFlexion}*pi/180;
      DriverVel={0};
      Reaction.Type={Off};
    };


   //finger4
//    AnyKinEqSimpleDriver CMC4={
//      AnyUniversalJoint &ref=  .RefHM.Right.ShoulderArm.Seg.Hand.Finger4.Jnt.CMC;
//      DriverPos={0,0}*pi/180;
//      DriverVel={0,0};
//    };
  AnyKinEqSimpleDriver MCP4={
    AnyUniversalJoint &ref=  .RefHM.Right.ShoulderArm.Seg.Hand.Finger4.Jnt.MCP;
    DriverPos={.JntPos.Right.Finger4.MCPFlexion,.JntPos.Right.Finger4.MCPAbduction}*pi/180;
    DriverVel={0,0};
    Reaction.Type={Off,Off};
  };
  AnyKinEqSimpleDriver PIP4={
    AnyRevoluteJoint &ref=  .RefHM.Right.ShoulderArm.Seg.Hand.Finger4.Jnt.PIP;
    DriverPos={.JntPos.Right.Finger4.PIPFlexion}*pi/180;
    DriverVel={0};
    Reaction.Type={Off};
  };
    AnyKinEqSimpleDriver DIP4={
      AnyRevoluteJoint &ref=  .RefHM.Right.ShoulderArm.Seg.Hand.Finger4.Jnt.DIP;
      DriverPos={.JntPos.Right.Finger4.DIPFlexion}*pi/180;
      DriverVel={0};
      Reaction.Type={Off};
    };


  // finger5
//    AnyKinEqSimpleDriver CMC5={
//      AnyUniversalJoint &ref=  .RefHM.Right.ShoulderArm.Seg.Hand.Finger5.Jnt.CMC;
//      DriverPos={0,0};
//      DriverVel={0,0};
//    };
  AnyKinEqSimpleDriver MCP5={
    AnyUniversalJoint &ref=  .RefHM.Right.ShoulderArm.Seg.Hand.Finger5.Jnt.MCP;
    DriverPos={.JntPos.Right.Finger5.MCPFlexion,.JntPos.Right.Finger5.MCPAbduction}*pi/180;
    DriverVel={0,0};
    Reaction.Type={Off,Off};
  };
  AnyKinEqSimpleDriver PIP5={
    AnyRevoluteJoint &ref=  .RefHM.Right.ShoulderArm.Seg.Hand.Finger5.Jnt.PIP;
    DriverPos={.JntPos.Right.Finger5.PIPFlexion}*pi/180;
    DriverVel={0};
    Reaction.Type={Off};
  };
    AnyKinEqSimpleDriver DIP5={
      AnyRevoluteJoint &ref=  .RefHM.Right.ShoulderArm.Seg.Hand.Finger5.Jnt.DIP;
      DriverPos={.JntPos.Right.Finger5.DIPFlexion}*pi/180;
      DriverVel={0};
      Reaction.Type={Off};
    };
